! Run simulations in a for loop.
! Perform a thermal simulation followed by a structural simulation in each loop.
! Paste simulation parameters for each simulation below, before the for loop, and set the number_of_data variable to the number of simulations.
! When performing multiplication operations in this script using the * operator, there should not be spaces on either side of *. For example, use `1*2` instead of `1 * 2`.


/CLEAR
/BATCH
! Disable "Solution is done" popup window.
KEYW,pr_sgui,1
! Disable popups.
/UIS,MSGPOP,4
! Set lengths to mm.
/UNITS, USER, LENFACTOR, 1/1000


! Geometric constants.
thickness = 20
thickness_z = 1

! Mesh settings.
mesh_divisions_horizontal = 32-1
mesh_divisions_vertical = 8-1

! Material property constants.
thermal_conductivity = 400
specific_heat = 300
mass_density = 10
elastic_modulus = 100e9
poissons_ratio = 0.3

! Simulation settings.
initial_temperature = 22+273.15
initial_temperature_left = 100+273.15
convection_bulk_temperature = 22+273.15
coefficient_thermal_expansion = 16e-9
duration = 5
steps = 10


! Define a table of simulation parameters.
number_of_data = 600
*DIM, parameters, ARRAY, 3, number_of_data
parameters(1,1) = 5, 0.1, 10
parameters(1,2) = 5, 0.1, 20
parameters(1,3) = 5, 0.1, 30
parameters(1,4) = 5, 0.1, 40
parameters(1,5) = 5, 0.1, 50
parameters(1,6) = 5, 0.1, 60
parameters(1,7) = 5, 0.1, 70
parameters(1,8) = 5, 0.1, 80
parameters(1,9) = 5, 0.1, 90
parameters(1,10) = 5, 0.1, 100
parameters(1,11) = 5, 0.2, 10
parameters(1,12) = 5, 0.2, 20
parameters(1,13) = 5, 0.2, 30
parameters(1,14) = 5, 0.2, 40
parameters(1,15) = 5, 0.2, 50
parameters(1,16) = 5, 0.2, 60
parameters(1,17) = 5, 0.2, 70
parameters(1,18) = 5, 0.2, 80
parameters(1,19) = 5, 0.2, 90
parameters(1,20) = 5, 0.2, 100
parameters(1,21) = 5, 0.3, 10
parameters(1,22) = 5, 0.3, 20
parameters(1,23) = 5, 0.3, 30
parameters(1,24) = 5, 0.3, 40
parameters(1,25) = 5, 0.3, 50
parameters(1,26) = 5, 0.3, 60
parameters(1,27) = 5, 0.3, 70
parameters(1,28) = 5, 0.3, 80
parameters(1,29) = 5, 0.3, 90
parameters(1,30) = 5, 0.3, 100
parameters(1,31) = 5, 0.4, 10
parameters(1,32) = 5, 0.4, 20
parameters(1,33) = 5, 0.4, 30
parameters(1,34) = 5, 0.4, 40
parameters(1,35) = 5, 0.4, 50
parameters(1,36) = 5, 0.4, 60
parameters(1,37) = 5, 0.4, 70
parameters(1,38) = 5, 0.4, 80
parameters(1,39) = 5, 0.4, 90
parameters(1,40) = 5, 0.4, 100
parameters(1,41) = 5, 0.5, 10
parameters(1,42) = 5, 0.5, 20
parameters(1,43) = 5, 0.5, 30
parameters(1,44) = 5, 0.5, 40
parameters(1,45) = 5, 0.5, 50
parameters(1,46) = 5, 0.5, 60
parameters(1,47) = 5, 0.5, 70
parameters(1,48) = 5, 0.5, 80
parameters(1,49) = 5, 0.5, 90
parameters(1,50) = 5, 0.5, 100
parameters(1,51) = 5, 0.6, 10
parameters(1,52) = 5, 0.6, 20
parameters(1,53) = 5, 0.6, 30
parameters(1,54) = 5, 0.6, 40
parameters(1,55) = 5, 0.6, 50
parameters(1,56) = 5, 0.6, 60
parameters(1,57) = 5, 0.6, 70
parameters(1,58) = 5, 0.6, 80
parameters(1,59) = 5, 0.6, 90
parameters(1,60) = 5, 0.6, 100
parameters(1,61) = 5, 0.7, 10
parameters(1,62) = 5, 0.7, 20
parameters(1,63) = 5, 0.7, 30
parameters(1,64) = 5, 0.7, 40
parameters(1,65) = 5, 0.7, 50
parameters(1,66) = 5, 0.7, 60
parameters(1,67) = 5, 0.7, 70
parameters(1,68) = 5, 0.7, 80
parameters(1,69) = 5, 0.7, 90
parameters(1,70) = 5, 0.7, 100
parameters(1,71) = 5, 0.8, 10
parameters(1,72) = 5, 0.8, 20
parameters(1,73) = 5, 0.8, 30
parameters(1,74) = 5, 0.8, 40
parameters(1,75) = 5, 0.8, 50
parameters(1,76) = 5, 0.8, 60
parameters(1,77) = 5, 0.8, 70
parameters(1,78) = 5, 0.8, 80
parameters(1,79) = 5, 0.8, 90
parameters(1,80) = 5, 0.8, 100
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parameters(1,600) = 10, 1.0, 100

! Save parameters defined in this script so that they can be accessed after calling /CLEAR.
PARSAV, ALL


! Start the for loop.
*DO, i, 1, number_of_data, 1

thickness = parameters(1, i, 1)
taper_ratio = parameters(2, i, 1)
convection_coefficient = parameters(3, i, 1)

! Convert parameters to strings to use for output file names.
thickness_string = CHRVAL(thickness)
thickness_string = STRFILL('00', thickness_string, 3-STRLENG(thickness_string))
taper_ratio_string = CHRVAL(taper_ratio)
convection_coefficient_string = CHRVAL(convection_coefficient)
convection_coefficient_string = STRFILL('000', convection_coefficient_string, 4-STRLENG(convection_coefficient_string))

/NOPR
KEYW,PR_SET,1
KEYW,PR_STRUC,0
KEYW,PR_THERM,1
KEYW,PR_FLUID,0
KEYW,PR_ELMAG,0
KEYW,MAGNOD,0
KEYW,MAGEDG,0
KEYW,MAGHFE,0
KEYW,MAGELC,0
KEYW,PR_MULTI,0
/GO


! Enter the model creation preprocessor.
/PREP7

! Create the four points of the geometry.
spacing = thickness*(1-taper_ratio)/2
K, 1, 0, 0, 0
K, 2, thickness, 0 + spacing, 0
K, 3, thickness, thickness - spacing, 0
K, 4, 0, thickness, 0
! Create the four lines that form the boundary of the geometry.
L, 1, 2
L, 2, 3
L, 3, 4
L, 4, 1
! Create the area using the four lines.
AL, 1, 2, 3, 4

! Define element type.
ET, 1, PLANE55
! Specify plane thickness behavior.
KEYOPT, 1, 3, 3
! Define the thickness.
R, 1, thickness_z

! Define material properties.
MPTEMP,,,,,,,,
MPTEMP,1,0
MPDATA,KXX,1,,thermal_conductivity
MPTEMP,,,,,,,,
MPTEMP,1,0
MPDATA,C,1,,specific_heat
MPTEMP,,,,,,,,
MPTEMP,1,0
MPDATA,ALPX,1,,coefficient_thermal_expansion
MPTEMP,,,,,,,,
MPTEMP,1,0
MPDATA,DENS,1,,mass_density
MPTEMP,,,,,,,,
MPTEMP,1,0
MPDATA,EX,1,,elastic_modulus
MPTEMP,,,,,,,,
MPTEMP,1,0
MPDATA,PRXY,1,,poissons_ratio

! Define the number of elements along each dimension and create the mesh.
! Horizontal lines have line numbers 1, 3.
LSEL, S, LINE, , 1, 3, 2, 0
LESIZE, ALL, , , mesh_divisions_horizontal, , , , , 1
! Vertical lines have line numbers 2, 4.
LSEL, S, LINE, , 2, 4, 2, 0
LESIZE, ALL, , , mesh_divisions_vertical, , , , , 1

! Create the mesh.
MSHAPE, 0, 2D
MSHKEY, 0
AMESH, 1

! Specify the initial temperature on all nodes.
ALLSEL, ALL, NODE
IC, ALL, TEMP, initial_temperature
! Specify the intial temperature on the left edge.
LSEL, S, , , 4
NSLL, S, 1
IC, ALL, TEMP, initial_temperature_left
! Specify a convection boundary condition.
LSEL, S, , , 1, 3, 1, 0
SFL, ALL, CONV, convection_coefficient, , convection_bulk_temperature
! Specify a reference temperature used for thermal strain calculations.
TREF, initial_temperature

! Specify the displacement boundary conditions.
DL, 4, ALL, UX, 0
DL, 4, ALL, UY, 0
DL, 4, ALL, UZ, 0

! Select all nodes again, which is required for solving.
ALLSEL
FINISH


! Enter the solution processor.
/SOL
! Define a transient analysis.
ANTYPE, TRANS
! Specify stepped loading instead of ramped loading (default).
KBC, 1
! Turn auto-time-stepping off.
AUTOTS, OFF
! Specify the end time of the current load step.
TIME, duration
! Specify the number of substeps. Alternatively, specify the time step using DELTIM.
NSUBST, steps, steps, steps
! Write results for every time step, instead of only the last one (default).
OUTRES, ALL, ALL
! Start the simulation.
SOLVE
FINISH


! Enter the database results postprocessor.
/POST1
! Loop over the data for each time step.
*DO, t, 1, steps, 1
    ! Specify the time step to read.
    SET, 1, t
    ! Get nodal temperatures.
    *VGET, temperature, NODE, , TEMP
    ! Get nodal thermal gradients.
    *VGET, thermal_gradient, NODE, , TG, SUM
    ! Get nodal coordinates.
    *VGET, location_x, NODE, , LOC, X
    *VGET, location_y, NODE, , LOC, Y

    ! Create the file name.
    t_string = CHRVAL(t)
    t_string = STRFILL('00', t_string, 3-STRLENG(t_string))
    filename = 'thermal_%thickness_string%_%taper_ratio_string%_%convection_coefficient_string%_%t_string%'
    ! Save the results to a file.
    *CFOPEN, filename, 'txt'
    *VWRITE, temperature(1), thermal_gradient(1), location_x(1), location_y(1)
    (E9.4, ',', E9.4, ',', F7.4, ',', F7.4)
    *CFCLOS
*ENDDO


! Switch to structural analysis.
/PREP7
ETCHG, TTS
! Read temperature data from the thermal simulation. The file extension rth must be specified, which represents the results of a thermal simulation.
LDREAD, TEMP, LAST, , , , , rth
! Start the simulation.
/SOL
SOLVE
FINISH


! Enter the database results postprocessor.
/POST1
SET, LAST
! Get nodal von Mises stresses.
*VGET, stress, NODE, , S, EQV
! Get nodal coordinates.
*VGET, location_x, NODE, , LOC, X
*VGET, location_y, NODE, , LOC, Y

! Create the file name.
filename = 'structural_%thickness_string%_%taper_ratio_string%_%convection_coefficient_string%'
! Save the results to a file.
*CFOPEN, filename, 'txt'
*VWRITE, stress(1), location_x(1), location_y(1)
(E9.4, ',', F7.4, ',', F7.4)
*CFCLOS


/CLEAR
# Restore parameters previously saved after calling /CLEAR.
PARRES

*ENDDO
